# TeensyStep Calculations
# Basic Formulas
# define:
s(v, v_0, a, s_s) := (v^2 - v_0^2)/(2*a) + s_s
ν(v) := v^2
s(ν, ν_0, a, s_s) := (ν - ν_0)/(2*a) + s_s
ν(s, ν_0, a, s_s) := 2*a*(s - s_s) + ν_0  # quadratic speed
# Intersection of acceleration and deceleration curves. Must be within s_s and s_e to generate a valid movement
s_sec(ν_s, ν_e, a, Δs) := 1/2*((ν_e - ν_s)/(2*a) + Δs)
s_acc(ν_s, ν_t, a) := (ν_t - ν_s)/(2*a)
s_dec(ν_s, ν_e, ν_t, a, Δs) := 2*s_sec(ν_s, ν_e, a, Δs) - s_acc(ν_s, ν_t, a)
# Example
a := 20000
s_s := 0
s_e := 15000
Δs := s_e - s_s = 15000
v_s := 200
v_t := 5000
v_e := 200
s_acc := s_acc(v_s^2, v_t^2, a) = 624
s_dec := s_dec(v_s^2, v_e^2, v_t^2, a, Δs) = 14376
s_sec := s_sec(v_s^2, v_e^2, a, Δs) = 7500
ν_acc(s) := ν(s, v_s^2, a, 0)
ν_dec(s) := ν(-s, v_e^2, a, -Δs)
ν_t := v_t^2
# The following graph shows the squared motor speed depending on the position s and the transition points from accelerated to constant to decelerated movement.
s := 0 .. Δs
# [plot: ν_acc(s), ν_dec(s), ν_t vs s]
